*Heading
** Job name: Buckle-PlaneStrain-WithoutAir Model name: SubFilm-w60-h345-f3-PlaneStrain-WitouthAir
** Generated by: Abaqus/CAE 2020
*Preprint, echo=NO, model=NO, history=NO, contact=NO
**
** PARTS
**
*Part, name=Plate
*Node
      1,          60.,         22.5,           0.
      2,          30.,         22.5,           0.
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*Element, type=C3D8R
  1,  288, 1149, 1975,  261,    1,   25,  142,    4
  2, 1149, 1150, 1976, 1975,   25,   26,  141,  142
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*Nset, nset=Film
    9,   10,   11,   12,   14,   15
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*Elset, elset=Film, generate
 2341,  3060,     1
*Nset, nset=FilmLeftPart
   10,   11,   14,   15,   17,   18
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*Elset, elset=FilmLeftPart, generate
 2341,  2700,     1
*Nset, nset=FilmLeftRight
   9,  12,  14,  15,  19,  20
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*Elset, elset=FilmLeftRight
 2695, 2696, 2697, 2698, 2699, 2700, 3055, 3056, 3057, 3058, 3059, 3060
*Nset, nset=FilmRightPart
    9,   10,   11,   12,   17,   18
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*Elset, elset=FilmRightPart, generate
 2701,  3060,     1
*Nset, nset=SampleBot
    5,    6,    7,    8,   23,   24
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*Elset, elset=SampleBot
  841,  842,  843,  844,  845,  846
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*Nset, nset=SampleLeftRight
    1,    4,    7,    8,    9,   12
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*Elset, elset=SampleLeftRight
    1,   61,  121,  181,  241,  301
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*Elset, elset=Substrate
    1,    2,    3,    4,    5,    6
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*Nset, nset=WholeSample, generate
    1,  8228,     1
*Elset, elset=WholeSample, generate
    1,  3960,     1
** Section: Homo-Substrate
*Solid Section, elset=Substrate, material=neoHookean-Substrate
,
** Section: Homo-Film
*Solid Section, elset=Film, material=neoHookean-Film
,
*End Part
**
**
** ASSEMBLY
**
*Assembly, name=Assembly
**
*Instance, name=Plate-1, part=Plate
*End Instance
**
*End Assembly
**
** MATERIALS
**
*Material, name=neoHookean-Air
*Expansion
 0.1,
*Hyperelastic, neo hooke
 0.1,10.
*Material, name=neoHookean-Film
*Expansion
 0.1,
*Hyperelastic, neo hooke
 4147.67, 2.49413e-05
*Material, name=neoHookean-Substrate
*Expansion
 0.1,
*Hyperelastic, neo hooke
 41.4767, 0.00249413
** ----------------------------------------------------------------
**
** STEP: Buckle
**
*Step, name=Buckle, nlgeom=NO, perturbation
*Buckle
10, , 30, 30
**
** BOUNDARY CONDITIONS
**
** Name: Ux Type: Displacement/Rotation
*Boundary, op=NEW, load case=1
Plate-1.SampleLeftRight, 1, 1
*Boundary, op=NEW, load case=2
Plate-1.SampleLeftRight, 1, 1
** Name: Uy Type: Displacement/Rotation
*Boundary, op=NEW, load case=1
Plate-1.SampleBot, 2, 2
*Boundary, op=NEW, load case=2
Plate-1.SampleBot, 2, 2
** Name: Uz Type: Displacement/Rotation
*Boundary, op=NEW, load case=1
Plate-1.WholeSample, 3, 3
*Boundary, op=NEW, load case=2
Plate-1.WholeSample, 3, 3
**
** PREDEFINED FIELDS
**
** Name: Temp   Type: Temperature
*Temperature
Plate-1.WholeSample, 1.
**
** OUTPUT REQUESTS
**
*Restart, write, frequency=0
**
** FIELD OUTPUT: F-Output-1
**
*Output, field, variable=PRESELECT
*NODE FILE, GLOBAL=YES
U,
*End Step
