*Heading
** Nodes--------------------------------------------------------------
*Node, NSET=AllNodes
*INCLUDE, INPUT=Coords-All.inp
** Elements-----------------------------------------------------------
** User element definition, list of active dof in the first node, refer to ABAQUS's convention, "8" is pressure "11" is temperature
*User element, type=u3, nodes=8, coordinates=3, properties=15, variables=20
1, 2, 3, 11, 8
*Element, type=u3, Elset=UserElem
*INCLUDE, INPUT=Elems-All.inp
** Dummy element overlaid on the user elements
*Element, type=C3D8, Elset=Dummy
*INCLUDE, INPUT=Elems-Dummy.inp
** Section: HomoSection
*Solid Section, elset=Dummy, material=Dummy
** SETS --------------------------------------------------------------
*INCLUDE, INPUT=Elems-Nodes-Set.inp
*Elset, elset=Film-Dummy
100901,100902,100903,100904,100905,100906
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*Elset, elset=Substrate-Dummy
100001,100002,100003,100004,100005,100006
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** MATERIALS ---------------------------------------------------------
*PARAMETER
Ef = 101562.0
Es = 3576.135714
Nu = 0.499
Bmag = 10.0
Mr = 44.4096
gFactor = 1.1
AmpForce = 20.0
** UEL parameters
** Em(Pa), Nu, Mr1(kA/m), Mr2(kA/m), Mr3(kA/m), Ba1(mT), Ba2(mT), Ba3(mT),
** gFactor, MaterialFlag
*UEL Property, elset=Air
1.e-10, <Nu>, 0.0, 0.0, 0.0, 0.0, <Bmag>, 0.0,
<gFactor>, 0.0
*UEL Property, elset=FilmLeftPart
<Ef>, <Nu>, <Mr>, 0.0, 0.0, 0.0, <Bmag>, 0.0,
<gFactor>, 1.0
*UEL Property, elset=FilmRightPart
<Ef>, <Nu>, -<Mr>, 0.0, 0.0, 0.0, <Bmag>, 0.0,
<gFactor>, 1.0
*UEL Property, elset=Substrate
<Es>, <Nu>, 0.0, 0.0, 0.0, 0.0, <Bmag>, 0.0,
<gFactor>, 2.0
** DUMMY MATERIAL
*MATERIAL,NAME=Dummy
*Hyperelastic, Neo Hooke
1.e-10, 1.e10
*User output variables
20
*Amplitude, name=Perturbation1
    0.0, 0.0,  0.1, 0.0,  0.99, <AmpForce>,  1.0, 0.0
*Amplitude, name=Perturbation2
    0.0, 0.0,  0.1, 0.0,  0.99, -<AmpForce>,  1.0, 0.0
** Constraint --------------------------------------------------------
** couple the air nodes with the sample boundary nodes
*EQUATION, INPUT=EquationAir.inp
*EQUATION, INPUT=EquationPhi.inp
** Geometry imperfection ---------------------------------------------
** *Imperfection, File=Buckle-PlaneStrain-WithAir, Step=1
** 1, -0.08
** TODO: this factor may need to be adjusted, 0.08 seems the minimum value to induce instability, if this value is too high, sample may not have expected one-bulge bending deformation
** STEP1 -------------------------------------------------------------
*STEP, name=Growth, nlgeom=YES, inc=200
*Static, stabilize, factor=0.01, allsdtol=0, continue=NO
** <init_step_size>, <end_time>, <min_step_size>, <max_step_size>
0.1, 1., 1e-05, 0.1
*CONTROLS, PARAMETERS=TIME INCREMENTATION
24,30,31,70,70
** BOUNDARY CONDITIONS -----------------------------------------------
*Boundary
SampleLeftRight, 1,1
SampleBot, 2,2
AllNodes, 3,3
SampleMiddle, 1,1
*Boundary
AirBoundary, 11,11
*CLOAD, amplitude=Perturbation1
*INCLUDE, INPUT=Load-Film.inp
** OUTPUT REQUESTS ---------------------------------------------------
*Output, field, freq=1
*Node Output, NSET=AllNodes
 U, COORD
*Element Output, elset=Dummy
 UVARM
*End Step
** STEP2 -------------------------------------------------------------
*STEP, name=LoadingPositive, nlgeom=YES, inc=200
*Static, stabilize, factor=0.01, allsdtol=0, continue=NO
** factor: a small amount of stabilization to help with convergence
** allsdtol: stabilization is applied until the solution error is below this value
** <init_step_size>, <end_time>, <min_step_size>, <max_step_size>
0.1, 1., 1e-05, 0.1
*CONTROLS, PARAMETERS=TIME INCREMENTATION
24,30,31,70,70
** BOUNDARY CONDITIONS -----------------------------------------------
*Boundary
SampleLeftRight, 1,1
SampleBot, 2,2
AllNodes, 3,3
SampleMiddle, 1,1
*Boundary
AirBoundary, 11,11
** OUTPUT REQUESTS ---------------------------------------------------
*Output, field, freq=1
*Node Output, NSET=AllNodes
 U, COORD
*Element Output, elset=Dummy
 UVARM
*End Step
** STEP3 -------------------------------------------------------------
*STEP, name=Unload1, nlgeom=YES, inc=200
*Static, stabilize, factor=1.5, allsdtol=0, continue=NO
** factor: a small amount of stabilization to help with convergence
** allsdtol: stabilization is applied until the solution error is below this value
** <init_step_size>, <end_time>, <min_step_size>, <max_step_size>
0.1, 1., 1e-05, 0.1
*CONTROLS, PARAMETERS=TIME INCREMENTATION
24,30,31,70,70
** BOUNDARY CONDITIONS -----------------------------------------------
*Boundary
SampleLeftRight, 1,1
SampleBot, 2,2
AllNodes, 3,3
SampleMiddle, 1,1
*Boundary
AirBoundary, 11,11
** OUTPUT REQUESTS ---------------------------------------------------
*Output, field, freq=1
*Node Output, NSET=AllNodes
 U, COORD
*Element Output, elset=Dummy
 UVARM
*End Step
** STEP4 -------------------------------------------------------------
*STEP, name=LoadingNegative, nlgeom=YES, inc=200
*Static, stabilize, factor=0.01, allsdtol=0, continue=NO
** factor: a small amount of stabilization to help with convergence
** allsdtol: stabilization is applied until the solution error is below this value
** <init_step_size>, <end_time>, <min_step_size>, <max_step_size>
0.1, 1., 1e-05, 0.1
*CONTROLS, PARAMETERS=TIME INCREMENTATION
24,30,31,70,70
** BOUNDARY CONDITIONS -----------------------------------------------
*Boundary
SampleLeftRight, 1,1
SampleBot, 2,2
AllNodes, 3,3
SampleMiddle, 1,1
*Boundary
AirBoundary, 11,11
** OUTPUT REQUESTS ---------------------------------------------------
*Output, field, freq=1
*Node Output, NSET=AllNodes
 U, COORD
*Element Output, elset=Dummy
 UVARM
*End Step
** STEP5 -------------------------------------------------------------
*STEP, name=Unload2, nlgeom=YES, inc=200
*Static, stabilize, factor=1.5, allsdtol=0, continue=NO
** factor: a small amount of stabilization to help with convergence
** allsdtol: stabilization is applied until the solution error is below this value
** <init_step_size>, <end_time>, <min_step_size>, <max_step_size>
0.1, 1., 1e-05, 0.1
*CONTROLS, PARAMETERS=TIME INCREMENTATION
24,30,31,70,70
** BOUNDARY CONDITIONS -----------------------------------------------
*Boundary
SampleLeftRight, 1,1
SampleBot, 2,2
AllNodes, 3,3
SampleMiddle, 1,1
*Boundary
AirBoundary, 11,11
** OUTPUT REQUESTS ---------------------------------------------------
*Output, field, freq=1
*Node Output, NSET=AllNodes
 U, COORD
*Element Output, elset=Dummy
 UVARM
*End Step
