*Heading
** Nodes--------------------------------------------------------------
*Node, NSET=AllNodes
*INCLUDE, INPUT=Coords-All.inp
** Elements-----------------------------------------------------------
** User element definition, list of active dof in the first node, refer to ABAQUS's convention, "8" is pressure "11" is temperature
*User element, type=u3, nodes=8, coordinates=3, properties=15, variables=20
1, 2, 3, 11, 8
*Element, type=u3, Elset=UserElem
*INCLUDE, INPUT=Elems-All.inp
** Dummy element overlaid on the user elements
*Element, type=C3D8, Elset=Dummy
*INCLUDE, INPUT=Elems-Dummy.inp
** Section: HomoSection
*Solid Section, elset=Dummy, material=Dummy
** SETS --------------------------------------------------------------
*INCLUDE, INPUT=Elems-Nodes-Set.inp
*Elset, elset=QuarterSection-Dummy
100337,100338,100339,100340,100341,100342
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*Elset, elset=Whole-Sample-Dummy, generate
 135317,  142960,      1
*Elset, elset=SampleAround-Dummy
110141,110142,110143,110144,110145,110146
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** MATERIALS ---------------------------------------------------------
** UEL parameters
** Em(Pa), Nu, Mr1(kA/m), Mr2(kA/m), Mr3(kA/m), Ba1(mT), Ba2(mT), Ba3(mT),
** gFactor, MaterialFlag
*UEL Property, elset=Air
1.e-10, 0.499, 0.0, 0.0, 0.0, 0.0, 0.0, 2000.0,
1.0, 0.0
*UEL Property, elset=Whole-Sample
719520, 0.499, 0.0, 0.0, 120.0, 0.0, 0.0, 2000.0,
1.0, 1.0
** Em=719.520 kPa, Nu=0.499 --> Gm=240kPa
** DUMMY MATERIAL
*MATERIAL,NAME=Dummy
*Hyperelastic, Neo Hooke
1.e-10, 1.e10
*User output variables
20
** Constraint --------------------------------------------------------
** TODO: couple the air nodes with the solid nodes
*EQUATION, INPUT=EquationInner.inp
*EQUATION, INPUT=EquationOuter.inp
*EQUATION, INPUT=EquationMiddle.inp
*EQUATION, INPUT=EquationTop.inp
** STEP1 -------------------------------------------------------------
*STEP, name=Growth, nlgeom=YES, inc=200
*Static
** *COUPLED TEMPERATURE-DISPLACEMENT, STEADY STATE
** <init_step_size>, <end_time>, <min_step_size>, <max_step_size>
0.25, 1., 1e-05, 0.25
*CONTROLS, PARAMETERS=TIME INCREMENTATION
24,30,31,70,70
** BOUNDARY CONDITIONS -----------------------------------------------
*Boundary
ZeroUX, 1,1
ZeroUY, 2,2
ZeroUZ, 3,3
AirMiddle, 1,2
*Boundary
AirBoundary, 11,11
** OUTPUT REQUESTS ---------------------------------------------------
*Output, field, freq=1
*Node Output, NSET=AllNodes
 U, COORD
*Element Output, elset=Dummy
 UVARM
*End Step
** STEP2 -------------------------------------------------------------
*STEP, name=Compress, nlgeom=YES, inc=200
*Static
** *COUPLED TEMPERATURE-DISPLACEMENT, STEADY STATE
** <init_step_size>, <end_time>, <min_step_size>, <max_step_size>
0.25, 1., 1e-05, 0.25
*CONTROLS, PARAMETERS=TIME INCREMENTATION
24,30,31,70,70
** BOUNDARY CONDITIONS -----------------------------------------------
*Boundary
ZeroUX, 1,1
ZeroUY, 2,2
ZeroUZ, 3,3
AirMiddle, 1,2
*Boundary
AirBoundary, 11,11
** OUTPUT REQUESTS ---------------------------------------------------
*Output, field, freq=1
*Node Output, NSET=AllNodes
 U, COORD
*Element Output, elset=Dummy
 UVARM
*End Step
** STEP3 -------------------------------------------------------------
*STEP, name=Pull, nlgeom=YES, inc=200
*Static
** *COUPLED TEMPERATURE-DISPLACEMENT, STEADY STATE
** <init_step_size>, <end_time>, <min_step_size>, <max_step_size>
0.10, 2., 1e-05, 0.10
*CONTROLS, PARAMETERS=TIME INCREMENTATION
24,30,31,70,70
** BOUNDARY CONDITIONS -----------------------------------------------
*Boundary
ZeroUX, 1,1
ZeroUY, 2,2
ZeroUZ, 3,3
AirMiddle, 1,2
*Boundary
AirBoundary, 11,11
** OUTPUT REQUESTS ---------------------------------------------------
*Output, field, freq=1
*Node Output, NSET=AllNodes
 U, COORD
*Element Output, elset=Dummy
 UVARM
*End Step
