*Heading
** Nodes--------------------------------------------------------------
*Node, NSET=AllNodes
*INCLUDE, INPUT=Coords-All.inp
** Elements-----------------------------------------------------------
** User element definition, list of active dof in the first node, refer to ABAQUS's convention, "8" is pressure "11" is temperature
*User element, type=u3, nodes=8, coordinates=3, properties=15, variables=20
1, 2, 3, 11, 8
*Element, type=u3, Elset=UserElem
*INCLUDE, INPUT=Elems-All.inp
** Dummy element overlaid on the user elements
*Element, type=C3D8, Elset=Dummy
*INCLUDE, INPUT=Elems-Dummy.inp
** Section: HomoSection
*Solid Section, elset=Dummy, material=Dummy
** SETS --------------------------------------------------------------
*INCLUDE, INPUT=Elems-Nodes-Set.inp
** MATERIALS ---------------------------------------------------------
*PARAMETER
Ef = 100000.0
Nu = 0.499
Bmag = 350.0
Mr = 100.0
gFactor = 1.0
** UEL parameters
** Em(Pa), Nu, Mr1(kA/m), Mr2(kA/m), Mr3(kA/m), Ba1(mT), Ba2(mT), Ba3(mT),
** gFactor, MaterialFlag
*UEL Property, elset=UserElem
<Ef>, <Nu>, <Mr>, <Mr>, 0.0, 0.0, 0.0, <Bmag>,
<gFactor>, 1.0
** DUMMY MATERIAL
*MATERIAL,NAME=Dummy
*Hyperelastic, Neo Hooke
1.e-10, 1.e10
*User output variables
20
*Amplitude, name=Amp-1
    0.,              0.,             0.01,              5.,              0.1,              0.,             1.0,              0.
** STEP1 -------------------------------------------------------------
*STEP, name=Growth, nlgeom=YES, inc=200
*Static, stabilize, factor=0.5, allsdtol=0, continue=NO
** *COUPLED TEMPERATURE-DISPLACEMENT, STEADY STATE
** <init_step_size>, <end_time>, <min_step_size>, <max_step_size>
0.001, 1.0, 1e-05, 0.1
*CONTROLS, PARAMETERS=TIME INCREMENTATION
24,30,31,70,70
** BOUNDARY CONDITIONS -----------------------------------------------
*Boundary
UX, 1,1
UY, 2,2
UZ, 3,3
*Boundary
AllNodes, 11,11
*Dsload, amplitude=Amp-1
Surf-top, P, 5.
** OUTPUT REQUESTS ---------------------------------------------------
*Output, field, freq=1
*Node Output, NSET=AllNodes
 U, COORD
*Element Output, elset=Dummy
 UVARM
*End Step
** STEP2 -------------------------------------------------------------
*STEP, name=LoadingPositive, nlgeom=YES, inc=200, extrapolation=linear
*Static, stabilize, factor=50.0, allsdtol=0, continue=NO
** factor: a small amount of stabilization to help with convergence
** allsdtol: stabilization is applied until the solution error is below this value
** *COUPLED TEMPERATURE-DISPLACEMENT, STEADY STATE
** <init_step_size>, <end_time>, <min_step_size>, <max_step_size>
0.001, 1.0, 1e-06, 0.1
*CONTROLS, PARAMETERS=TIME INCREMENTATION
24,30,31,70,70
** BOUNDARY CONDITIONS -----------------------------------------------
*Boundary
UX, 1,1
UY, 2,2
UZ, 3,3
*Boundary
AllNodes, 11,11
** OUTPUT REQUESTS ---------------------------------------------------
*Output, field, freq=1
*Node Output, NSET=AllNodes
 U, COORD
*Element Output, elset=Dummy
 UVARM
*End Step
** STEP3 -------------------------------------------------------------
*STEP, name=Unload1, nlgeom=YES, inc=200, extrapolation=linear
*Static, stabilize, factor=5.0, allsdtol=0, continue=NO
** factor: a small amount of stabilization to help with convergence
** allsdtol: stabilization is applied until the solution error is below this value
** *COUPLED TEMPERATURE-DISPLACEMENT, STEADY STATE
** <init_step_size>, <end_time>, <min_step_size>, <max_step_size>
0.1, 1.0, 1e-06, 0.1
*CONTROLS, PARAMETERS=TIME INCREMENTATION
24,30,31,70,70
** BOUNDARY CONDITIONS -----------------------------------------------
*Boundary
UX, 1,1
UY, 2,2
UZ, 3,3
*Boundary
AllNodes, 11,11
** OUTPUT REQUESTS ---------------------------------------------------
*Output, field, freq=1
*Node Output, NSET=AllNodes
 U, COORD
*Element Output, elset=Dummy
 UVARM
*End Step
